*HEADING
R4 gradient thermal rpm=24000.0
*NODE
1, 52.950000, 0.000000, 0.000000
2, 58.533333, 0.000000, 0.000000
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*ELEMENT, TYPE=C3D8, ELSET=SOLID
1, 1, 2, 6, 5, 29, 30, 34, 33
2, 2, 3, 7, 6, 30, 31, 35, 34
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*NSET, NSET=SYM0
1, 2, 3, 4, 29, 30, 31, 32
*NSET, NSET=SYM90
25, 26, 27, 28, 53, 54, 55, 56
*NSET, NSET=FIXZ
1, 2, 3, 4, 5, 6
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*NSET, NSET=ALLN
1, 2, 3, 4, 5, 6
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*MATERIAL, NAME=Steel
*ELASTIC
210000.0, 0.300
*DENSITY
7.810000e-09
*EXPANSION
1.200000e-05
*SOLID SECTION, ELSET=SOLID, MATERIAL=Steel
*BOUNDARY
SYM0, 2, 2
SYM90, 1, 1
FIXZ, 3, 3
*INITIAL CONDITIONS, TYPE=TEMPERATURE
ALLN, 20.000
*STEP
*STATIC
*DLOAD
SOLID, CENTRIF, 6.316547e+06, 0., 0., 0., 0., 0., 1.
*TEMPERATURE
1, 160.9354
2, 150.1897
3, 130.9818
4, 115.2332
5, 160.9354
6, 150.1897
7, 130.9818
8, 115.2332
9, 160.9354
10, 150.1897
11, 130.9818
12, 115.2332
13, 160.9354
14, 150.1897
15, 130.9818
16, 115.2332
17, 160.9354
18, 150.1897
19, 130.9818
20, 115.2332
21, 160.9354
22, 150.1897
23, 130.9818
24, 115.2332
25, 160.9354
26, 150.1897
27, 130.9818
28, 115.2332
29, 160.9354
30, 150.1897
31, 130.9818
32, 115.2332
33, 160.9354
34, 150.1897
35, 130.9818
36, 115.2332
37, 160.9354
38, 150.1897
39, 130.9818
40, 115.2332
41, 160.9354
42, 150.1897
43, 130.9818
44, 115.2332
45, 160.9354
46, 150.1897
47, 130.9818
48, 115.2332
49, 160.9354
50, 150.1897
51, 130.9818
52, 115.2332
53, 160.9354
54, 150.1897
55, 130.9818
56, 115.2332
*EL PRINT, ELSET=SOLID
S
*END STEP
